// SBML level 2 version 4

function Function_for_v_0(Naive, default, mu_N)
  Naive*mu_N/default;
end

function Function_for_v_2(EarlyEffector, Pathogen, default, rho_E)
  EarlyEffector*Pathogen*rho_E/default;
end

function Function_for_v_1(Naive, Pathogen, default, delta_NE)
  Naive*Pathogen*delta_NE/default;
end

function Function_for_v_3(EarlyEffector, default, mu_EE)
  EarlyEffector^2*mu_EE/default;
end

function Function_for_v_4(EarlyEffector, default, delta_EL)
  EarlyEffector*delta_EL/default;
end

function Function_for_v_5(LateEffector, default, mu_LL)
  LateEffector^2*mu_LL/default;
end

function Function_for_v_6(EarlyEffector, LateEffector, default, mu_LE)
  EarlyEffector*LateEffector*mu_LE/default;
end

function Function_for_v_7(LateEffector, default, delta_LM)
  LateEffector*delta_LM/default;
end

function Function_for_v_8(Pathogen, default, rho_P)
  Pathogen^2*rho_P/default;
end

function Function_for_v_9(EarlyEffector, Pathogen, default, mu_PE)
  EarlyEffector*Pathogen*mu_PE/default;
end

function Function_for_v_10(LateEffector, Pathogen, default, mu_PL)
  LateEffector*Pathogen*mu_PL/default;
end

function Function_for_v_11(Pathogen, default, mu_P)
  Pathogen*mu_P/default;
end

function function_for_v_12(Naive, Pathogen, default, delta_NM)
  Naive*Pathogen*delta_NM/default;
end

function function_for_v_13(Naive, Pathogen, default, delta_NL)
  Naive*Pathogen*delta_NL/default;
end

function function_for_v_14(EarlyEffector, default, delta_EM)
  EarlyEffector*delta_EM/default;
end

function function_for_v_15(default, Memory, delta_ME)
  Memory*delta_ME/default;
end

function function_for_v_16(default, LateEffector, delta_LE)
  LateEffector*delta_LE/default;
end

function function_for_v_17(default, Memory, delta_ML)
  Memory*delta_ML/default;
end

function function_for_v_19(default, Memory, mu_M)
  Memory*mu_M/default;
end

function function_for_v_20(default, LateEffector, mu_L)
  LateEffector*mu_L/default;
end

function function_for_v_18(EarlyEffector, mu_E, default)
  EarlyEffector*mu_E/default;
end

function function_for_v_21(EarlyEffector, LateEffector, mu_EL, default)
  EarlyEffector*LateEffector*mu_EL/default;
end

model logicle5_1000_crauste_full()
  // NoName

  // Compartments:
  compartment default = 1;

  // Species:
  species Naive in default = 8090;
  species EarlyEffector in default = 0;
  species LateEffector in default = 0;
  species Memory in default = 0;
  species Pathogen in default = 1;

  // Parameters:
  delta_EL = 0.517946;
  delta_LM = 0.02258064;
  delta_NE = 0.01193079;
  mu_EE = 3.913593e-5;
  mu_LE = 1e-10;
  mu_LL = 8.115201e-6;
  mu_N = 0.7399073;
  mu_P = 1e-5;
  mu_PE = 1.365718e-10;
  mu_PL = 3.634031e-5;
  rho_E = 0.5074157;
  rho_P = 0.1263823;
  delta_NM = 0;
  delta_NL = 0;
  delta_EM = 0;
  delta_ME = 0;
  delta_LE = 0;
  delta_ML = 0;
  mu_E = 0;
  mu_M = 0;
  mu_L = 0;
  mu_EL = 0;
  noiseParameter1_Naive = 0;
  noiseParameter1_EarlyEffector = 0;
  noiseParameter1_LateEffector = 0;
  noiseParameter1_Memory = 0;

  // Assignment rules:
  observable_Naive := Naive;
  observable_EarlyEffector := EarlyEffector;
  observable_LateEffector := LateEffector;
  observable_Memory := Memory;
  sigma_Naive := noiseParameter1_Naive;
  sigma_EarlyEffector := noiseParameter1_EarlyEffector;
  sigma_LateEffector := noiseParameter1_LateEffector;
  sigma_Memory := noiseParameter1_Memory;

  // Reactions:
  v1_v_0: Naive => ; default*Function_for_v_0(Naive, default, mu_N);
  v2_v_1: Naive => EarlyEffector; default*Function_for_v_1(Naive, Pathogen, default, delta_NE);  // modifiers: Pathogen
  v3_v_2: => EarlyEffector; default*Function_for_v_2(EarlyEffector, Pathogen, default, rho_E);  // modifiers: Pathogen
  v4_v_3: EarlyEffector => ; default*Function_for_v_3(EarlyEffector, default, mu_EE);
  v5_v_4: EarlyEffector => LateEffector; default*Function_for_v_4(EarlyEffector, default, delta_EL);
  v6_v_5: LateEffector => ; default*Function_for_v_5(LateEffector, default, mu_LL);
  v7_v_6: LateEffector => ; default*Function_for_v_6(EarlyEffector, LateEffector, default, mu_LE);  // modifiers: EarlyEffector
  v8_v_7: LateEffector => Memory; default*Function_for_v_7(LateEffector, default, delta_LM);
  v9_v_8: => Pathogen; default*Function_for_v_8(Pathogen, default, rho_P);
  v10_v_9: Pathogen => ; default*Function_for_v_9(EarlyEffector, Pathogen, default, mu_PE);  // modifiers: EarlyEffector
  v11_v_10: Pathogen => ; default*Function_for_v_10(LateEffector, Pathogen, default, mu_PL);  // modifiers: LateEffector
  v12_v_11: Pathogen => ; default*Function_for_v_11(Pathogen, default, mu_P);
  v_12: Naive => Memory; default*function_for_v_12(Naive, Pathogen, default, delta_NM);  // modifiers: Pathogen
  v_13: Naive => LateEffector; default*function_for_v_13(Naive, Pathogen, default, delta_NL);  // modifiers: Pathogen
  v_14: EarlyEffector => Memory; default*function_for_v_14(EarlyEffector, default, delta_EM);
  v_15: Memory => EarlyEffector; default*function_for_v_15(default, Memory, delta_ME);
  v_16: LateEffector => EarlyEffector; default*function_for_v_16(default, LateEffector, delta_LE);
  v_17: Memory => LateEffector; default*function_for_v_17(default, Memory, delta_ML);
  v_18: EarlyEffector => ; default*function_for_v_18(EarlyEffector, mu_E, default);
  v_19: Memory => ; default*function_for_v_19(default, Memory, mu_M);
  v_20: LateEffector => ; default*function_for_v_20(default, LateEffector, mu_L);
  v_21: EarlyEffector => ; default*function_for_v_21(EarlyEffector, LateEffector, mu_EL, default);  // modifiers: LateEffector

  // Unit definitions:
  unit time = 3600 second;
end
