// SBML level 2 version 4

function Function_for_v_9(EarlyEffector, Pathogen, default, mu_PE)
  EarlyEffector*Pathogen*mu_PE/default;
end

function Function_for_v_0(Naive, default, mu_N)
  Naive*mu_N/default;
end

function Function_for_v_8(Pathogen, default, rho_P)
  Pathogen^2*rho_P/default;
end

function function_for_v_16_1(LateEffector, default, delta_LE)
  LateEffector*delta_LE/default;
end

function Function_for_v_7(LateEffector, default, delta_LM)
  LateEffector*delta_LM/default;
end

function Function_for_v_10(LateEffector, Pathogen, default, mu_PL)
  LateEffector*Pathogen*mu_PL/default;
end

function Function_for_v_3(EarlyEffector, default, mu_EE)
  EarlyEffector^2*mu_EE/default;
end

function Function_for_v_5(LateEffector, default, mu_LL)
  LateEffector^2*mu_LL/default;
end

function Function_for_v_4(EarlyEffector, default, delta_EL)
  EarlyEffector*delta_EL/default;
end

function Function_for_v_1(Naive, Pathogen, default, delta_NE)
  Naive*Pathogen*delta_NE/default;
end

function Function_for_v_2(EarlyEffector, Pathogen, default, rho_E)
  EarlyEffector*Pathogen*rho_E/default;
end

model crauste_full_log10_3()
  // crauste_full_logicle5_1

  // Compartments:
  compartment default = 1;

  // Species:
  species Naive in default = 8090;
  species EarlyEffector in default = 0;
  species LateEffector in default = 0;
  species Memory in default = 0;
  species Pathogen in default = 1;

  // Parameters:
  delta_EL = 0.517946;
  delta_LM = 0.02258064;
  delta_NE = 0.01193079;
  mu_EE = 3.913593e-5;
  mu_LL = 8.115201e-6;
  mu_N = 0.7399073;
  mu_PE = 1.365718e-10;
  mu_PL = 3.634031e-5;
  rho_E = 0.5074157;
  rho_P = 0.1263823;
  delta_LE = 0;
  noiseParameter1_Naive = 0;
  noiseParameter1_EarlyEffector = 0;
  noiseParameter1_LateEffector = 0;
  noiseParameter1_Memory = 0;

  // Assignment rules:
  sigma_EarlyEffector := noiseParameter1_EarlyEffector;
  observable_EarlyEffector := EarlyEffector;
  observable_Naive := Naive;
  sigma_LateEffector := noiseParameter1_LateEffector;
  observable_Memory := Memory;
  sigma_Memory := noiseParameter1_Memory;
  sigma_Naive := noiseParameter1_Naive;
  observable_LateEffector := LateEffector;

  // Reactions:
  v1_v_0: Naive => ; default*Function_for_v_0(Naive, default, mu_N);
  v2_v_1: Naive => EarlyEffector; default*Function_for_v_1(Naive, Pathogen, default, delta_NE);  // modifiers: Pathogen
  v3_v_2: => EarlyEffector; default*Function_for_v_2(EarlyEffector, Pathogen, default, rho_E);  // modifiers: Pathogen
  v4_v_3: EarlyEffector => ; default*Function_for_v_3(EarlyEffector, default, mu_EE);
  v5_v_4: EarlyEffector => LateEffector; default*Function_for_v_4(EarlyEffector, default, delta_EL);
  v6_v_5: LateEffector => ; default*Function_for_v_5(LateEffector, default, mu_LL);
  v8_v_7: LateEffector => Memory; default*Function_for_v_7(LateEffector, default, delta_LM);
  v9_v_8: => Pathogen; default*Function_for_v_8(Pathogen, default, rho_P);
  v10_v_9: Pathogen => ; default*Function_for_v_9(EarlyEffector, Pathogen, default, mu_PE);  // modifiers: EarlyEffector
  v11_v_10: Pathogen => ; default*Function_for_v_10(LateEffector, Pathogen, default, mu_PL);  // modifiers: LateEffector
  v_16: LateEffector => EarlyEffector; default*function_for_v_16_1(LateEffector, default, delta_LE);

  // Unit definitions:
  unit time = 3600 second;
end
