// SBML level 2 version 4

function function_for_R3(k3, x1, x2, default)
  k3*x1*x2/default;
end

function function_for_R1(k1, default)
  k1/default;
end

function function_for_R2(k2, x1, default)
  k2*x1/default;
end

model caroModel_logicle5_1000()
  // caroModel

  // Compartments:
  compartment default = 1;

  // Species:
  species x1 in default = 0;
  species x2 in default = 0;

  // Parameters:
  k1 = 0.2;
  k2 = 0.1;
  k3 = 0;
  noiseParameter1_x2 = 0.05;

  // Assignment rules:
  observable_x2 := x2;
  sigma_x2 := noiseParameter1_x2;

  // Reactions:
  R1: => x1; default*function_for_R1(k1, default);
  R2: x1 => x2; default*function_for_R2(k2, x1, default);
  R3: x1 + x2 => ; default*function_for_R3(k3, x1, x2, default);
end
